**
** Single C3D8, SIMPLE SHEAR — validates the shear convention against real ccx.
**
** u_x = 0.01*y, u_y = u_z = 0 on all nodes → homogeneous tensorial strain with
** eps_12 = 0.005 (engineering gamma_12 = 0.01), all other components zero. For
** isotropic small-strain elasticity the only nonzero stress is
**   S12 = 2*mu*eps_12 = 2*0.7*0.005 = 0.007.
**
** This deck DISCRIMINATES the boundary's shear convention (which the uniaxial
** deck, having zero shear, cannot): if the emitted material wrongly treated the
** CalculiX `emec`/STRAN as ENGINEERING shear, it would report S12 = 0.014.
** A real ccx run gives S12 = 0.007, confirming abq_std<3,false> (tensorial).
**
** Uses the external (dlopen) material; for the compiled-in path change NAME to
** USERELAS and use build_and_run.sh.
**
*NODE, NSET=NALL
1, 0.0, 0.0, 0.0
2, 1.0, 0.0, 0.0
3, 1.0, 1.0, 0.0
4, 0.0, 1.0, 0.0
5, 0.0, 0.0, 1.0
6, 1.0, 0.0, 1.0
7, 1.0, 1.0, 1.0
8, 0.0, 1.0, 1.0
*ELEMENT, TYPE=C3D8, ELSET=EALL
1, 1, 2, 3, 4, 5, 6, 7, 8
*NSET, NSET=NY0
1, 2, 5, 6
*NSET, NSET=NY1
3, 4, 7, 8
*MATERIAL, NAME=@LINEARELASTIC_NCG_UMAT
*USER MATERIAL, CONSTANTS=2
1.3, 0.7
*SOLID SECTION, ELSET=EALL, MATERIAL=@LINEARELASTIC_NCG_UMAT
*STEP
*STATIC
*BOUNDARY
NY0, 1, 1, 0.0
NY0, 2, 3, 0.0
NY1, 1, 1, 0.01
NY1, 2, 3, 0.0
*EL PRINT, ELSET=EALL
S, E
*END STEP
